ORIGIN := 1
a := [1, 2, 4, 8, 1, 0, 0; 3, 5, 1, 0, 0, 1, 0; 6, 0, 3, 1, 0, 0, 1]
b := [24; 12; 35]
c := [4; 2; 5; 8; 0; 0; 0]
Z(x) := sum(c[j]*x[j], j = 1 .. 7)
x[7] := 0
Given
a*x == b
x ≥ 0
x := Maximize(Z, x)
Z(x) = 36
x = [2.32613; 0; 5.0216; 0.198431; 0; 0; 5.78]
