ORIGIN := 1
a := [0.0018, 2.1; 0.0021, 0.9]
b := [0.002; 10]
c := [12000; 9000]
Z(x) := sum(c[j]*x[j], j = 1 .. 2)
x[2] := 0
Given
a*x ≤ b
x ≥ 0
x := Maximize(Z, x)
x = [1.11111; 0]
Z(x) = 13333.3
sera := x[1]*a[1, 1] = 0.002
aerozol := x[1]*a[1, 2] = 2.33333
