ORIGIN := 1
a := [3, 4, 2, 1, 0, 0, 0; 2, 5, 1, 0, 1, 0, 0; 1, 2, 4, 0, 0, 1, 0]
b := [9; 8; 7]
c := [3; 5; 4; 0; 0; 0; 0]
Z(x) := sum(c[j]*x[j], j = 1 .. 6)
x[7] := 0
x[6] := 0
Given
a*x == b
x ≥ 0
x := Maximize(Z, x)
Z(x) = 12
x = [1; 1; 1; 0; 0; 0; 0]
