ORIGIN := 1
a := [20, 9, 6, 1, 1, 0; 10, 4, 2, 1, 0, 1]
b := [20; 10]
c := [60; 26; 15; 4.75; 0; 0]
Z(x) := sum(c[j]*x[j], j = 1 .. 6)
x[6] := 0
Given
a*x == b
x ≥ 0
x := Maximize(Z, x)
Z(x) = 61.5
x = [0; 2; 0; 2; 0; 0]
